# OpenSim document version 40000
Model LaiArnold2D:
  gravity: 0 -9.80665 0
  length_units: meters
  force_units: N
  credits:
    Rajagopal Model w/ updated knee, modified for movements involving high hip and knee flexion
  publications:
    Lai,A.K.M., Arnold, A.S., Wakeling, J.M. (2017) Why are antagonist muscles co-activated in my simulation? A musculoskeletal model for analysing human locomotor tasks. Annals of Biomedical Engineering
  Ground
  BodySet:
    Body pelvis: mass=40.8427 [kg] mass_center=(-0.07070017 0 0) inertia=(0.09192126 0.0778827 0.05177277 0 0 0)
        meshes=(r_pelvis.vtp l_pelvis.vtp sacrum.vtp)
      WrapCylinder Gmax1_at_pelvis_r: xyz_body_rotation=(-0.6 0.45 0) translation=(-0.07700019 -0.09900024 0.06100015)
          quadrant=-x radius=0.0400001 length=0.1500004
      WrapCylinder Gmax2_at_pelvis_r: xyz_body_rotation=(-0.75 0.39 0) translation=(-0.0800002 -0.0830002 0.06800017)
          quadrant=all radius=0.0400001 length=0.1000002
      WrapCylinder Gmax3_at_pelvis_r: xyz_body_rotation=(-0.1 0 0) translation=(-0.0830002 -0.08800022 0.06800017)
          quadrant=all radius=0.0400001 length=0.1000002
      WrapCylinder Gmax1_at_pelvis_l: xyz_body_rotation=(0.6 -0.45 0) translation=(-0.07700019 -0.09900024 -0.06100015)
          quadrant=-x radius=0.0400001 length=0.1500004
      WrapCylinder Gmax2_at_pelvis_l: xyz_body_rotation=(0.75 -0.39 0) translation=(-0.0800002 -0.0830002 -0.06800017)
          quadrant=all radius=0.0400001 length=0.1000002
      WrapCylinder Gmax3_at_pelvis_l: xyz_body_rotation=(0.1 0 0) translation=(-0.0830002 -0.08800022 -0.06800017)
          quadrant=all radius=0.0400001 length=0.1000002
      WrapCylinder PS_at_brim_r: xyz_body_rotation=(-0.25 -0.27 0.1) translation=(-0.07400018 -0.06000015 0.06560016)
          quadrant=-y radius=0.05000012 length=0.1000002
      WrapCylinder PS_at_brim_l: xyz_body_rotation=(0.25 0.27 0.1) translation=(-0.07400018 -0.06000015 -0.06560016)
          quadrant=-y radius=0.05000012 length=0.1000002
      WrapCylinder IL_at_brim_r: xyz_body_rotation=(-0.32 -0.24 0.9) translation=(-0.07100018 -0.06500016 0.07560019)
          quadrant=-y radius=0.05490014 length=0.1000002
      WrapCylinder IL_at_brim_l: xyz_body_rotation=(0.32 0.24 0.9) translation=(-0.07100018 -0.06500016 -0.07560019)
          quadrant=-y radius=0.05490014 length=0.1000002
    Body femur_r: mass=8.050036 mass_center=(0 -0.1681614 0) inertia=(0.1133926 0.02972428 0.1195746 0 0 0)
        meshes=r_femur.vtp
      WrapCylinder GasLat_at_condyles_r: translation=(0.004945923 -0.4055657 0) quadrant=all radius=0.0257188
          length=0.09891846
      WrapCylinder GasMed_at_condyles_r: translation=(0.004945923 -0.4055657 0) quadrant=all radius=0.02472961
          length=0.09891846
      WrapCylinder KnExt_at_fem_r: xyz_body_rotation=(-0.0623366 0.0507601 0)
          translation=(0.003549471 -0.3983763 0.002068494) quadrant=all radius=0.02472961 length=0.09891846
      WrapCylinder KnExtVL_at_fem_r: xyz_body_rotation=(-0.0623366 0.0507601 0)
          translation=(0.001867857 -0.3983763 0.002068494) quadrant=all radius=0.02472961 length=0.09891846
      WrapCylinder AB_at_femshaft_r: xyz_body_rotation=(1.66157 0.186644 0)
          translation=(0.01448503 -0.1113772 0.0231123) quadrant=all radius=0.01632155 length=0.06924292
      WrapCylinder AL_at_femshaft_r: xyz_body_rotation=(1.77711 0.136489 0)
          translation=(0.03040031 -0.2294008 0.01495024) quadrant=all radius=0.01988261 length=0.09891846
      WrapCylinder AMprox_at_femshaft_r: xyz_body_rotation=(1.61126 0.18656 0)
          translation=(0.005126934 -0.07210641 0.02512826) quadrant=all radius=0.02087179 length=0.06924292
      WrapCylinder AMmid_at_femshaft_r: xyz_body_rotation=(1.61139 0.13656 0)
          translation=(0.02276361 -0.1589728 0.02036157) quadrant=all radius=0.02116855 length=0.1187022
      WrapCylinder AMdist_at_femshaft_r: xyz_body_rotation=(1.71188 0.186636 0)
          translation=(0.03126466 -0.257916 0.009263318) quadrant=all radius=0.02156422 length=0.1978369
      WrapCylinder AMisch_at_condyles_r: xyz_body_rotation=(1.71115 -0.463363 0)
          translation=(-0.02240612 -0.3727554 -0.003120254) quadrant=all radius=0.03956738 length=0.2374043
      WrapCylinder PECT_at_femshaft_r: xyz_body_rotation=(1.81295 0.276344 0)
          translation=(0.00601991 -0.08358897 0.03011127) quadrant=all radius=0.01483777 length=0.04945923
    Body tibia_r: mass=3.073711 mass_center=(0 -0.1820535 0) inertia=(0.03973032 0.00402033 0.04028213 0 0 0)
        meshes=(r_tibia.vtp r_fibula.vtp)
      WrapCylinder GasLat_at_shank_r: xyz_body_rotation=(2.96723 -0.279725 -1.47812)
          translation=(-0.007215834 -0.07215834 -0.003217872) quadrant=-y radius=0.0536312 length=0.09751127
      WrapCylinder GasMed_at_shank_r: xyz_body_rotation=(2.96723 0.0279725 -1.47812)
          translation=(-0.007215834 -0.07215834 -0.003217872) quadrant=-y radius=0.05753165 length=0.09751127
      WrapCylinder GR_at_condyles_r: xyz_body_rotation=(0 -0.4 0) translation=(-0.002925338 -0.01950225 0) quadrant=all
          radius=0.03510406 length=0.09751127
      WrapCylinder SM_at_condyles_r: xyz_body_rotation=(0 -0.1 0) translation=(-0.0009751127 -0.01950225 0)
          quadrant=all radius=0.03364139 length=0.09751127
      WrapCylinder ST_at_condyles_r: xyz_body_rotation=(0 -0.2 0) translation=(-0.001950225 -0.01998981 0) quadrant=all
          radius=0.04144229 length=0.09751127
      WrapCylinder BF140_at_gastroc_r: translation=(-0.0380294 -0.05850676 0) quadrant=y radius=0.02827827
          length=0.1462669
    Body patella_r: mass=0.07707699 mass_center=(0.0018 0.0264 0) inertia=(2.566252e-6 1.17225e-5 1.17225e-5 0 0 0)
        meshes=r_patella.vtp
    Body talus_r: mass=0.08156672 mass_center=(0 0 0) inertia=(0.0007672025 0.0007672025 0.0007672025 0 0 0)
        meshes=r_talus.vtp
    Body calcn_r: mass=1.019584 mass_center=(0.09698365 0.02909509 0) inertia=(0.001074083 0.00299209 0.00314553 0 0 0)
        meshes=r_foot.vtp
    Body toes_r: mass=0.1766735 mass_center=(0.03355634 0.005819019 -0.01697214)
        inertia=(7.672025e-5 0.0001534405 0.0007672025 0 0 0) meshes=r_bofoot.vtp
    Body femur_l: mass=8.050036 mass_center=(0 -0.1681614 0) inertia=(0.1133926 0.02972428 0.1195746 0 0 0)
        meshes=l_femur.vtp
      WrapCylinder GasLat_at_condyles_l: translation=(0.004945923 -0.4055657 0) quadrant=all radius=0.0257188
          length=0.09891846
      WrapCylinder GasMed_at_condyles_l: translation=(0.004945923 -0.4055657 0) quadrant=all radius=0.02472961
          length=0.09891846
      WrapCylinder KnExt_at_fem_l: xyz_body_rotation=(0.0623366 -0.0507601 0)
          translation=(0.003549471 -0.3983763 -0.002068494) quadrant=all radius=0.02472961 length=0.09891846
      WrapCylinder KnExtVL_at_fem_l: xyz_body_rotation=(0.0623366 -0.0507601 0)
          translation=(0.001867857 -0.3983763 -0.002068494) quadrant=all radius=0.02472961 length=0.09891846
      WrapCylinder AB_at_femshaft_l: xyz_body_rotation=(-1.66157 -0.186644 0)
          translation=(0.01448503 -0.1113772 -0.0231123) quadrant=all radius=0.01632155 length=0.06924292
      WrapCylinder AL_at_femshaft_l: xyz_body_rotation=(-1.77711 -0.136489 0)
          translation=(0.03040031 -0.2294008 -0.01495024) quadrant=all radius=0.01988261 length=0.09891846
      WrapCylinder AMprox_at_femshaft_l: xyz_body_rotation=(-1.61126 -0.18656 0)
          translation=(0.005126934 -0.07210641 -0.02512826) quadrant=all radius=0.02087179 length=0.06924292
      WrapCylinder AMmid_at_femshaft_l: xyz_body_rotation=(-1.61139 -0.13656 0)
          translation=(0.02276361 -0.1589728 -0.02036157) quadrant=all radius=0.02116855 length=0.1187022
      WrapCylinder AMdist_at_femshaft_l: xyz_body_rotation=(-1.71188 -0.186636 0)
          translation=(0.03126466 -0.257916 -0.009263318) quadrant=all radius=0.02156422 length=0.1978369
      WrapCylinder AMisch_at_condyles_l: xyz_body_rotation=(-1.71115 0.463363 0)
          translation=(-0.02240612 -0.3727554 0.003120254) quadrant=all radius=0.03956738 length=0.2374043
      WrapCylinder PECT_at_femshaft_l: xyz_body_rotation=(-1.81295 -0.276344 0)
          translation=(0.00601991 -0.08358897 -0.03011127) quadrant=all radius=0.01483777 length=0.04945923
    Body tibia_l: mass=3.073711 mass_center=(0 -0.1820535 0) inertia=(0.03973032 0.00402033 0.04028213 0 0 0)
        meshes=(l_tibia.vtp l_fibula.vtp)
      WrapCylinder GasLat_at_shank_l: xyz_body_rotation=(-2.96723 0.279725 -1.47812)
          translation=(-0.007215834 -0.07215834 0.003217872) quadrant=-y radius=0.0536312 length=0.09751127
      WrapCylinder GasMed_at_shank_l: xyz_body_rotation=(-2.96723 -0.0279725 -1.47812)
          translation=(-0.007215834 -0.07215834 0.003217872) quadrant=-y radius=0.05753165 length=0.09751127
      WrapCylinder GR_at_condyles_l: xyz_body_rotation=(0 0.4 0) translation=(-0.002925338 -0.01950225 0) quadrant=all
          radius=0.03510406 length=0.09751127
      WrapCylinder SM_at_condyles_l: xyz_body_rotation=(0 0.1 0) translation=(-0.0009751127 -0.01950225 0) quadrant=all
          radius=0.03364139 length=0.09751127
      WrapCylinder ST_at_condyles_l: xyz_body_rotation=(0 0.2 0) translation=(-0.001950225 -0.01998981 0) quadrant=all
          radius=0.04144229 length=0.09751127
      WrapCylinder BF140_at_gastroc_l: translation=(-0.0380294 -0.05850676 0) quadrant=all radius=0.02827827
          length=0.1462669
    Body patella_l: mass=0.07707699 mass_center=(0.0018 0.0264 0) inertia=(2.566252e-6 1.17225e-5 1.17225e-5 0 0 0)
        meshes=l_pat.vtp
    Body talus_l: mass=0.08156672 mass_center=(0 0 0) inertia=(0.0007672025 0.0007672025 0.0007672025 0 0 0)
        meshes=l_talus.vtp
    Body calcn_l: mass=1.019584 mass_center=(0.09698365 0.02909509 0) inertia=(0.001074083 0.00299209 0.00314553 0 0 0)
        meshes=l_foot.vtp
    Body toes_l: mass=0.1766735 mass_center=(0.03355634 0.005819019 0.01697214)
        inertia=(7.672025e-5 0.0001534405 0.0007672025 0 0 0) meshes=l_bofoot.vtp
  JointSet:
    PinJoint ground_pelvis: socket_parent_frame=ground_offset socket_child_frame=pelvis_offset
      Coordinate pelvis_tilt: range=(-1.570796 1.570796)
      PhysicalOffsetFrame ground_offset: socket_parent=/ground translation=(-0.1641868 0.7924308 0) [meters]
      PhysicalOffsetFrame pelvis_offset: socket_parent=/bodyset/pelvis translation=(0 0 0)
    PinJoint hip_r: socket_parent_frame=pelvis_offset socket_child_frame=femur_r_offset
      Coordinate hip_flexion_r: default_value=0 range=(-0.5235988 2.094395) clamped=true
      PhysicalOffsetFrame pelvis_offset: socket_parent=/bodyset/pelvis translation=(-0.05627614 -0.07849019 0.07726019)
      PhysicalOffsetFrame femur_r_offset: socket_parent=/bodyset/femur_r translation=(0 0 0)
    CustomJoint knee_r: socket_parent_frame=femur_r_offset socket_child_frame=tibia_r_offset
      Coordinate knee_angle_r: default_value=3.78747e-5 range=(0 2.443461) clamped=true
      PhysicalOffsetFrame femur_r_offset: socket_parent=/bodyset/femur_r
          translation=(-0.004451331 -0.40517 -0.001731073) orientation=(-1.64157 1.44618 1.5708) [radians]
      PhysicalOffsetFrame tibia_r_offset: socket_parent=/bodyset/tibia_r
          translation=(-0.007888213 -0.003446828 -0.001447789) orientation=(-1.64157 1.44618 1.5708)
      SpatialTransform:
        TransformAxis rotation1: coordinates=knee_angle_r axis=(1 0 0) LinearFunction(coefficients=1 0)
        TransformAxis rotation2: coordinates=knee_angle_r axis=(0 0 1)
          PolynomialFunction: coefficients=(0.008427576 -0.01572011 -0.04459472 0.08388252 -0.0003744788)
        TransformAxis rotation3: coordinates=knee_angle_r axis=(0 1 0)
          PolynomialFunction: coefficients=(0.0001428485 0.02460491 -0.1687903 0.3692198 2.186408e-5)
        TransformAxis translation1: coordinates=knee_angle_r axis=(1 0 0)
          PolynomialFunction: coefficients=(0.0001580386 -0.001006442 0.001799439 2.658709e-5 -1.132354e-6)
        TransformAxis translation2: coordinates=knee_angle_r axis=(0 1 0)
          PolynomialFunction: coefficients=(-0.0007938795 0.005919951 -0.01248032 0.00441721 -8.092207e-5)
        TransformAxis translation3: coordinates=knee_angle_r axis=(0 0 1)
          PolynomialFunction: coefficients=(0.0009781625 -0.003536486 -0.0004977297 0.006672457 -5.946764e-5)
    CustomJoint patellofemoral_r: socket_parent_frame=femur_r_offset socket_child_frame=patella_r_offset
      Coordinate knee_angle_r_beta: default_value=3.78747e-5 range=(-99999.9 99999.9) clamped=false
      PhysicalOffsetFrame femur_r_offset: socket_parent=/bodyset/femur_r
          translation=(-0.008002503 -0.4035477 -0.002720258)
      PhysicalOffsetFrame patella_r_offset: socket_parent=/bodyset/patella_r translation=(0 0 0)
      SpatialTransform: axes_held_at_zero=(rotation2 rotation3)
        TransformAxis rotation1: coordinates=knee_angle_r_beta axis=(0 0 1)
          PolynomialFunction: coefficients=(-0.117242 0.6507882 -1.270303 0.0328791 0.003644103)
        TransformAxis translation1: coordinates=knee_angle_r_beta axis=(1 0 0)
          PolynomialFunction: coefficients=(-0.0004734409 0.01088874 -0.02940743 -0.01763255 0.05227694)
        TransformAxis translation2: coordinates=knee_angle_r_beta axis=(0 1 0)
          PolynomialFunction: coefficients=(-0.003726517 0.01410602 0.007789718 -0.04765803 -0.01076248)
        TransformAxis translation3: axis=(0 0 1) MultiplierFunction(scale=0.9891846, Constant(value=0.00275))
    PinJoint ankle_r: socket_parent_frame=tibia_r_offset socket_child_frame=talus_r_offset
      Coordinate ankle_angle_r: default_value=-2.402933e-10 range=(-0.6981317 0.5235988) clamped=true
      PhysicalOffsetFrame tibia_r_offset: socket_parent=/bodyset/tibia_r translation=(-0.009751127 -0.3900451 0)
          orientation=(0.175895 -0.105208 0.0186622)
      PhysicalOffsetFrame talus_r_offset: socket_parent=/bodyset/talus_r translation=(0 0 0)
          orientation=(0.175895 -0.105208 0.0186622)
    WeldJoint subtalar_r: socket_parent_frame=talus_r_offset socket_child_frame=calcn_r_offset
      PhysicalOffsetFrame talus_r_offset: socket_parent=/bodyset/talus_r
          translation=(-0.04729892 -0.04068464 0.007681105) orientation=(-1.76819 0.906223 1.8196)
      PhysicalOffsetFrame calcn_r_offset: socket_parent=/bodyset/calcn_r translation=(0 0 0)
          orientation=(-1.76819 0.906223 1.8196)
    WeldJoint mtp_r: socket_parent_frame=calcn_r_offset socket_child_frame=toes_r_offset
      PhysicalOffsetFrame calcn_r_offset: socket_parent=/bodyset/calcn_r
          translation=(0.1734068 -0.001939673 0.001047423) orientation=(-3.14159 0.619901 0)
      PhysicalOffsetFrame toes_r_offset: socket_parent=/bodyset/toes_r translation=(0 0 0)
          orientation=(-3.14159 0.619901 0)
    PinJoint hip_l: socket_parent_frame=pelvis_offset socket_child_frame=femur_l_offset
      Coordinate hip_flexion_l: default_value=0 range=(-0.5235988 2.094395) clamped=true
      PhysicalOffsetFrame pelvis_offset: socket_parent=/bodyset/pelvis
          translation=(-0.05627614 -0.07849019 -0.07726019)
      PhysicalOffsetFrame femur_l_offset: socket_parent=/bodyset/femur_l translation=(0 0 0)
    CustomJoint knee_l: socket_parent_frame=femur_l_offset socket_child_frame=tibia_l_offset
      Coordinate knee_angle_l: default_value=1.997077e-5 range=(0 2.443461) clamped=true
      PhysicalOffsetFrame femur_l_offset: socket_parent=/bodyset/femur_l
          translation=(-0.004451331 -0.40517 0.001731073) orientation=(1.64157 -1.44618 1.5708)
      PhysicalOffsetFrame tibia_l_offset: socket_parent=/bodyset/tibia_l
          translation=(-0.007888213 -0.003446828 0.001447789) orientation=(1.64157 -1.44618 1.5708)
      SpatialTransform:
        TransformAxis rotation1: coordinates=knee_angle_l axis=(-1 0 0) LinearFunction(coefficients=1 0)
        TransformAxis rotation2: coordinates=knee_angle_l axis=(0 0 1)
          PolynomialFunction: coefficients=(0.008427576 -0.01572011 -0.04459472 0.08388252 -0.0003744788)
        TransformAxis rotation3: coordinates=knee_angle_l axis=(0 1 0)
          PolynomialFunction: coefficients=(-0.0001428485 -0.02460491 0.1687903 -0.3692198 -2.186408e-5)
        TransformAxis translation1: coordinates=knee_angle_l axis=(1 0 0)
          PolynomialFunction: coefficients=(0.0001580386 -0.001006442 0.001799439 2.658709e-5 -1.132354e-6)
        TransformAxis translation2: coordinates=knee_angle_l axis=(0 1 0)
          PolynomialFunction: coefficients=(-0.0007938795 0.005919951 -0.01248032 0.00441721 -8.092207e-5)
        TransformAxis translation3: coordinates=knee_angle_l axis=(0 0 1)
          PolynomialFunction: coefficients=(-0.0009781625 0.003536486 0.0004977297 -0.006672457 5.946764e-5)
    CustomJoint patellofemoral_l: socket_parent_frame=femur_l_offset socket_child_frame=patella_l_offset
      Coordinate knee_angle_l_beta: default_value=1.997077e-5 range=(-99999.9 99999.9) clamped=false
      PhysicalOffsetFrame femur_l_offset: socket_parent=/bodyset/femur_l
          translation=(-0.008002503 -0.4035477 0.002720258)
      PhysicalOffsetFrame patella_l_offset: socket_parent=/bodyset/patella_l translation=(0 0 0)
      SpatialTransform: axes_held_at_zero=(rotation2 rotation3)
        TransformAxis rotation1: coordinates=knee_angle_l_beta axis=(0 0 1)
          PolynomialFunction: coefficients=(-0.117242 0.6507882 -1.270303 0.0328791 0.003644103)
        TransformAxis translation1: coordinates=knee_angle_l_beta axis=(1 0 0)
          PolynomialFunction: coefficients=(-0.0004734409 0.01088874 -0.02940743 -0.01763255 0.05227694)
        TransformAxis translation2: coordinates=knee_angle_l_beta axis=(0 1 0)
          PolynomialFunction: coefficients=(-0.003726517 0.01410602 0.007789718 -0.04765803 -0.01076248)
        TransformAxis translation3: axis=(0 0 1) MultiplierFunction(scale=0.9891846, Constant(value=-0.00275))
    PinJoint ankle_l: socket_parent_frame=tibia_l_offset socket_child_frame=talus_l_offset
      Coordinate ankle_angle_l: default_value=-1.092651e-10 range=(-0.6981317 0.5235988) clamped=true
      PhysicalOffsetFrame tibia_l_offset: socket_parent=/bodyset/tibia_l translation=(-0.009751127 -0.3900451 0)
          orientation=(-0.175895 0.105208 0.0186622)
      PhysicalOffsetFrame talus_l_offset: socket_parent=/bodyset/talus_l translation=(0 0 0)
          orientation=(-0.175895 0.105208 0.0186622)
    WeldJoint subtalar_l: socket_parent_frame=talus_l_offset socket_child_frame=calcn_l_offset
      PhysicalOffsetFrame talus_l_offset: socket_parent=/bodyset/talus_l
          translation=(-0.04729892 -0.04068464 -0.007681105) orientation=(1.76819 -0.906223 1.8196)
      PhysicalOffsetFrame calcn_l_offset: socket_parent=/bodyset/calcn_l translation=(0 0 0)
          orientation=(1.76819 -0.906223 1.8196)
    WeldJoint mtp_l: socket_parent_frame=calcn_l_offset socket_child_frame=toes_l_offset
      PhysicalOffsetFrame calcn_l_offset: socket_parent=/bodyset/calcn_l
          translation=(0.1734068 -0.001939673 -0.001047423) orientation=(-3.14159 -0.619901 0)
      PhysicalOffsetFrame toes_l_offset: socket_parent=/bodyset/toes_l translation=(0 0 0)
          orientation=(-3.14159 -0.619901 0)
  ConstraintSet:
    CoordinateCouplerConstraint patellofemoral_knee_angle_r_con: independent_coordinate_names=knee_angle_r
        dependent_coordinate_name=knee_angle_r_beta scale_factor=1
        coupled_coordinates_function=LinearFunction(coefficients=1 0)
    CoordinateCouplerConstraint patellofemoral_knee_angle_l_con: independent_coordinate_names=knee_angle_l
        dependent_coordinate_name=knee_angle_l_beta scale_factor=1
        coupled_coordinates_function=LinearFunction(coefficients=1 0)
  ForceSet:
    Millard2012EquilibriumMuscle [values shared by the 80 below unless stated]: fiber_damping=0.01
        default_activation=0.01 minimum_activation=0.01
      ActiveForceLengthCurve: min_norm_active_fiber_length=0.25 transition_norm_fiber_length=0.77
          max_norm_active_fiber_length=1.9 shallow_ascending_slope=0.75 minimum_value=0
      ForceVelocityCurve: concentric_slope_at_vmax=0 concentric_slope_near_vmax=0.25 isometric_slope=5
          eccentric_slope_at_vmax=0 eccentric_slope_near_vmax=0.15 max_eccentric_velocity_force_multiplier=1.4
      FiberForceLengthCurve: strain_at_zero_force=0 strain_at_one_norm_force=0.7
      TendonForceLengthCurve
    Millard2012EquilibriumMuscle add_brev_r: max_isometric_force=625.8197 optimal_fiber_length=0.1022839
        tendon_slack_length=0.03516969 pennation_angle_at_optimal=0.1147809 [radians] ignore_tendon_compliance=true
      PathPoint addbrev_r-P1: pelvis (-0.01910005 -0.09400023 0.01540004)
      PathPoint addbrev_r-P2: femur_r (-0.001978369 -0.1167238 0.0246307)
      PathWrap: wrap_object=AB_at_femshaft_r method=hybrid
    Millard2012EquilibriumMuscle add_long_r: max_isometric_force=916.8 optimal_fiber_length=0.1071066
        tendon_slack_length=0.1304675 pennation_angle_at_optimal=0.1377704
      PathPoint addlong_r-P1: pelvis (-0.007580019 -0.08890022 0.01888005)
      PathPoint addlong_r-P2: femur_r (0.01113822 -0.2367811 0.01565879)
      PathWrap: wrap_object=AL_at_femshaft_r method=hybrid
    Millard2012EquilibriumMuscle addmagDist_r: max_isometric_force=597.2951 optimal_fiber_length=0.1749768
        tendon_slack_length=0.08628438 pennation_angle_at_optimal=0.194705 ignore_tendon_compliance=true
      PathPoint P1: pelvis (-0.07404018 -0.1276703 0.0398201)
      PathPoint P2: femur_r (0.01112833 -0.259661 0.01909126)
      PathWrap: wrap_object=AMdist_at_femshaft_r method=hybrid
    Millard2012EquilibriumMuscle addmagIsch_r: max_isometric_force=597.2951 optimal_fiber_length=0.1542752
        tendon_slack_length=0.2136771 pennation_angle_at_optimal=0.1680443
      PathPoint P1: pelvis (-0.08962022 -0.1297603 0.0417101)
      PathPoint P2: femur_r (0.004757978 -0.3837739 -0.03237601)
      PathWrap: wrap_object=AMisch_at_condyles_r method=hybrid
    Millard2012EquilibriumMuscle addmagMid_r: max_isometric_force=597.2951 optimal_fiber_length=0.136118
        tendon_slack_length=0.04609202 pennation_angle_at_optimal=0.2073076 ignore_tendon_compliance=true
      PathPoint P1: pelvis (-0.05266013 -0.1207503 0.02854007)
      PathPoint P2: femur_r (0.002393827 -0.1606436 0.02890397)
      PathWrap: wrap_object=AMmid_at_femshaft_r method=hybrid
    Millard2012EquilibriumMuscle addmagProx_r: max_isometric_force=597.2951 optimal_fiber_length=0.1049365
        tendon_slack_length=0.04007075 pennation_angle_at_optimal=0.3114833 ignore_tendon_compliance=true
      PathPoint P1: pelvis (-0.03098008 -0.1075503 0.01365003)
      PathPoint P2: femur_r (-0.01510485 -0.0780071 0.03167369)
      PathWrap: wrap_object=AMprox_at_femshaft_r method=hybrid
    Millard2012EquilibriumMuscle bifemlh_r: max_isometric_force=1313.184 optimal_fiber_length=0.09628549
        tendon_slack_length=0.3280218 pennation_angle_at_optimal=0.1759182
      PathPoint bflh_r-P1: pelvis (-0.1040003 -0.1191003 0.05860014)
      PathPoint bflh_r-P2: tibia_r (-0.03350487 -0.03557211 0.03527958)
      PathPoint bflh_r-P3: tibia_r (-0.02636705 -0.04883364 0.03389492)
    Millard2012EquilibriumMuscle bifemsh_r: max_isometric_force=557.1148 optimal_fiber_length=0.108885
        tendon_slack_length=0.1044597 pennation_angle_at_optimal=0.2642232 ignore_tendon_compliance=true
      PathPoint bfsh_r-P1: femur_r (0.004945923 -0.2088169 0.02314692)
      PathPoint bfsh_r-P2: tibia_r (-0.02794673 -0.0320227 0.03124261)
      PathWrap: wrap_object=BF140_at_gastroc_r method=hybrid
    Millard2012EquilibriumMuscle ext_dig_r: max_isometric_force=603.4982 optimal_fiber_length=0.06743663
        tendon_slack_length=0.3589567 pennation_angle_at_optimal=0.2182582
      PathPoint edl_r-P1: tibia_r (-0.0156018 -0.1128205 0.01998981)
      PathPoint edl_r-P2: tibia_r (0.01599185 -0.3666424 0.01092126)
      PathPoint edl_r-P3: calcn_r (0.08912797 0.03491411 0.0007758692)
      PathPoint edl_r-P4: calcn_r (0.1567256 0.0053341 0.01260787)
      PathPoint edl_r-P5: toes_r (0.0002909509 0.004558231 0.0148385)
      PathPoint edl_r-P6: toes_r (0.04296375 -0.0003879346 0.02424591)
    Millard2012EquilibriumMuscle ext_hal_r: max_isometric_force=285.8675 optimal_fiber_length=0.07276914
        tendon_slack_length=0.3179226 pennation_angle_at_optimal=0.1972681
      PathPoint ehl_r-P1: tibia_r (-0.01365158 -0.1511425 0.01842963)
      PathPoint ehl_r-P2: tibia_r (0.0069233 -0.2836603 0.01599185)
      PathPoint ehl_r-P3: tibia_r (0.01950225 -0.3601091 -0.002730316)
      PathPoint ehl_r-P4: calcn_r (0.09407414 0.03772664 -0.02046355)
      PathPoint ehl_r-P5: calcn_r (0.1253999 0.02996795 -0.0249248)
      PathPoint ehl_r-P6: calcn_r (0.1681696 0.01348073 -0.02715542)
      PathPoint ehl_r-P7: toes_r (0.02890113 0.003976329 -0.02376099)
      PathPoint ehl_r-P8: toes_r (0.05460179 0.003297444 -0.01803896)
    Millard2012EquilibriumMuscle flex_dig_r: max_isometric_force=423.177 optimal_fiber_length=0.04337437
        tendon_slack_length=0.368364 pennation_angle_at_optimal=0.2248391
      PathPoint fdl_r-P1: tibia_r (-0.002242759 -0.1786406 -0.001755203)
      PathPoint fdl_r-P2: tibia_r (-0.01716198 -0.3554286 -0.0120914)
      PathPoint fdl_r-P3: calcn_r (0.04228487 0.03054985 -0.02715542)
      PathPoint fdl_r-P4: calcn_r (0.06866442 0.01706912 -0.0255067)
      PathPoint fdl_r-P5: calcn_r (0.1607989 -0.007855675 0.0112501)
      PathPoint fdl_r-P6: toes_r (-0.001842689 -0.007564724 0.0142566)
      PathPoint fdl_r-P7: toes_r (0.02764034 -0.006885839 0.02085148)
      PathPoint fdl_r-P8: toes_r (0.04276979 -0.005819019 0.02347004)
    Millard2012EquilibriumMuscle flex_hal_r: max_isometric_force=907.8393 optimal_fiber_length=0.05123767
        tendon_slack_length=0.3445074 pennation_angle_at_optimal=0.2580255
      PathPoint fhl_r-P1: tibia_r (-0.03022849 -0.2109169 0.01950225)
      PathPoint fhl_r-P2: tibia_r (-0.02359773 -0.3579639 -0.007410857)
      PathPoint fhl_r-P3: calcn_r (0.03627188 0.02676749 -0.02337306)
      PathPoint fhl_r-P4: calcn_r (0.100669 0.006594888 -0.02482781)
      PathPoint fhl_r-P5: calcn_r (0.1673938 -0.005140133 -0.0260886)
      PathPoint fhl_r-P6: toes_r (0.01503247 -0.006206953 -0.02570067)
      PathPoint fhl_r-P7: toes_r (0.05450481 -0.009892332 -0.01755404)
    Millard2012EquilibriumMuscle lat_gas_r: max_isometric_force=1575.059 optimal_fiber_length=0.06731494
        tendon_slack_length=0.3648665 pennation_angle_at_optimal=0.2102268
      PathPoint gaslat_r-P1: femur_r (0.001978369 -0.3768793 0.02036731)
      PathPoint gaslat_r-P2: calcn_r (0.00426728 0.03006493 -0.005140133)
      PathWrap gaslat_r_at_shank: wrap_object=GasLat_at_shank_r method=hybrid
      PathWrap gaslat_r_at_condyles: wrap_object=GasLat_at_condyles_r method=hybrid
    Millard2012EquilibriumMuscle med_gas_r: max_isometric_force=3115.515 optimal_fiber_length=0.05756382
        tendon_slack_length=0.3775797 pennation_angle_at_optimal=0.1656816
      PathPoint gasmed_r-P1: femur_r (0.005935108 -0.3808361 -0.02176206)
      PathPoint gasmed_r-P2: calcn_r (0.00426728 0.03006493 -0.005140133)
      PathWrap gasMed_r_at_shank: wrap_object=GasMed_at_shank_r method=hybrid
      PathWrap gasMed_r_at_condyles: wrap_object=GasMed_at_condyles_r method=hybrid
    Millard2012EquilibriumMuscle glut_max1_r: max_isometric_force=983.7836 optimal_fiber_length=0.1464935
        tendon_slack_length=0.08699922 pennation_angle_at_optimal=0.3540118 ignore_tendon_compliance=true
      PathPoint glmax1_r-P1: pelvis (-0.1231003 0.03450009 0.05630014)
      PathPoint glmax1_r-P2: pelvis (-0.1257003 -0.02420006 0.07790019)
      PathPoint glmax1_r-P3: femur_r (-0.0439198 -0.03224742 0.02987337)
      PathPoint glmax1_r-P4: femur_r (-0.02740041 -0.05598785 0.04649168)
      PathWrap: wrap_object=Gmax1_at_pelvis_r method=hybrid
    Millard2012EquilibriumMuscle glut_max2_r: max_isometric_force=1406.046 optimal_fiber_length=0.1562596
        tendon_slack_length=0.108486 pennation_angle_at_optimal=0.3673821 ignore_tendon_compliance=true
      PathPoint glmax2_r-P1: pelvis (-0.1317003 0.008700021 0.04620011)
      PathPoint glmax2_r-P2: pelvis (-0.1344003 -0.06090015 0.0813002)
      PathPoint glmax2_r-P3: femur_r (-0.04451331 -0.05776838 0.02492745)
      PathPoint glmax2_r-P4: femur_r (-0.01543128 -0.1005012 0.04144683)
      PathWrap: wrap_object=Gmax2_at_pelvis_r method=hybrid
    Millard2012EquilibriumMuscle glut_max3_r: max_isometric_force=947.7541 optimal_fiber_length=0.166002
        tendon_slack_length=0.1023845 pennation_angle_at_optimal=0.3824161 ignore_tendon_compliance=true
      PathPoint glmax3_r-P1: pelvis (-0.1300003 -0.05250013 0.009000022)
      PathPoint glmax3_r-P2: pelvis (-0.1273003 -0.1263003 0.04350011)
      PathPoint glmax3_r-P3: femur_r (-0.02779609 -0.1112833 0.009298335)
      PathPoint glmax3_r-P4: femur_r (-0.005935108 -0.1403653 0.04065549)
      PathWrap: wrap_object=Gmax3_at_pelvis_r method=hybrid
    Millard2012EquilibriumMuscle glut_med1_r: max_isometric_force=1093.467 optimal_fiber_length=0.07284137
        tendon_slack_length=0.05569554 pennation_angle_at_optimal=0.3165559 ignore_tendon_compliance=true
      PathPoint glmed1_r-P1: pelvis (-0.04450011 0.02450006 0.1172003)
      PathPoint glmed1_r-P2: femur_r (-0.02156422 -0.01157346 0.05489974)
    Millard2012EquilibriumMuscle glut_med2_r: max_isometric_force=765.0917 optimal_fiber_length=0.07282374
        tendon_slack_length=0.06509127 pennation_angle_at_optimal=0.3165559 ignore_tendon_compliance=true
      PathPoint glmed2_r-P1: pelvis (-0.08500021 0.03160008 0.06750017)
      PathPoint glmed2_r-P2: femur_r (-0.02552096 -0.005737271 0.05213003)
    Millard2012EquilibriumMuscle glut_med3_r: max_isometric_force=871.1993 optimal_fiber_length=0.07278115
        tendon_slack_length=0.04509724 pennation_angle_at_optimal=0.3165559 ignore_tendon_compliance=true
      PathPoint glmed3_r-P1: pelvis (-0.1152003 -0.007300018 0.05260013)
      PathPoint glmed3_r-P2: femur_r (-0.0305658 -0.004649168 0.05123976)
    Millard2012EquilibriumMuscle glut_min1_r: max_isometric_force=374.0459 optimal_fiber_length=0.06772118
        tendon_slack_length=0.01607161 pennation_angle_at_optimal=0.1745329 ignore_tendon_compliance=true
      PathPoint glmin1_r-P1: pelvis (-0.04640011 -0.01490004 0.1042003)
      PathPoint glmin1_r-P2: femur_r (-0.007122129 -0.01028752 0.05539434)
    Millard2012EquilibriumMuscle glut_min2_r: max_isometric_force=394.8197 optimal_fiber_length=0.05575174
        tendon_slack_length=0.02598335 pennation_angle_at_optimal=0 ignore_tendon_compliance=true
      PathPoint glmin2_r-P1: pelvis (-0.06160015 -0.01420004 0.09710024)
      PathPoint glmin2_r-P2: femur_r (-0.009496172 -0.01028752 0.05539434)
    Millard2012EquilibriumMuscle glut_min3_r: max_isometric_force=446.7738 optimal_fiber_length=0.03782649
        tendon_slack_length=0.05064021 pennation_angle_at_optimal=0.01745329
      PathPoint glmin3_r-P1: pelvis (-0.07890019 -0.01550004 0.0798002)
      PathPoint glmin3_r-P2: femur_r (-0.01335399 -0.008210232 0.05440515)
    Millard2012EquilibriumMuscle grac_r: max_isometric_force=281.3115 optimal_fiber_length=0.2244925
        tendon_slack_length=0.1695163 pennation_angle_at_optimal=0.1720016 ignore_tendon_compliance=true
      PathPoint P1: pelvis (-0.04736012 -0.1293203 0.02456006)
      PathPoint P2: tibia_r (-0.01796158 -0.04636661 -0.02887309)
      PathPoint P3: tibia_r (0.001735701 -0.06788735 -0.01533852)
      PathWrap: wrap_object=GR_at_condyles_r method=hybrid
    Millard2012EquilibriumMuscle iliacus_r: max_isometric_force=1021.141 optimal_fiber_length=0.1062724
        tendon_slack_length=0.09582534 pennation_angle_at_optimal=0.279914 ignore_tendon_compliance=true
      PathPoint P1: pelvis (-0.06050015 0.03090008 0.08430021)
      PathPoint P2: pelvis (-0.01350003 -0.05570014 0.07560019)
      PathPoint P3: femur_r (-0.002275125 -0.05588893 0.01374967)
      PathPoint P4: femur_r (-0.01206805 -0.06301106 0.01938802)
      PathWrap: wrap_object=IL_at_brim_r method=hybrid range=(2 3)
    Millard2012EquilibriumMuscle per_brev_r: max_isometric_force=521.2016 optimal_fiber_length=0.04422138
        tendon_slack_length=0.1436976 pennation_angle_at_optimal=0.2052361
      PathPoint perbrev_r-P1: tibia_r (-0.02369524 -0.2468985 0.02447533)
      PathPoint perbrev_r-P2: tibia_r (-0.03305632 -0.3796114 0.02428031)
      PathPoint perbrev_r-P3: tibia_r (-0.02779071 -0.3904351 0.02486537)
      PathPoint perbrev_r-P4: calcn_r (0.0456793 0.02618558 0.02259719)
      PathPoint perbrev_r-P5: calcn_r (0.06565793 0.02123942 0.03326539)
    Millard2012EquilibriumMuscle per_long_r: max_isometric_force=1115.371 optimal_fiber_length=0.04945329
        tendon_slack_length=0.3234135 pennation_angle_at_optimal=0.2479525
      PathPoint perlong_r-P1: tibia_r (-0.01950225 -0.133883 0.02749818)
      PathPoint perlong_r-P2: tibia_r (-0.03091107 -0.380294 0.02311017)
      PathPoint perlong_r-P3: tibia_r (-0.02652307 -0.3914102 0.02340271)
      PathPoint perlong_r-P4: calcn_r (0.04247884 0.02230624 0.02143339)
      PathPoint perlong_r-P5: calcn_r (0.06604586 0.01028027 0.02754336)
      PathPoint perlong_r-P6: calcn_r (0.08263007 0.006691872 0.01144407)
      PathPoint perlong_r-P7: calcn_r (0.1166713 0.00824361 -0.01784499)
    Millard2012EquilibriumMuscle peri_r: max_isometric_force=1029.787 optimal_fiber_length=0.02594384
        tendon_slack_length=0.114658 pennation_angle_at_optimal=0.1745329
      PathPoint piri_r-P1: pelvis (-0.1018103 -0.006530016 0.01351003)
      PathPoint piri_r-P2: pelvis (-0.1020203 -0.03066008 0.06092015)
      PathPoint piri_r-P3: femur_r (-0.01463993 -0.003561065 0.04322737)
    Millard2012EquilibriumMuscle psoas_r: max_isometric_force=1426.79 optimal_fiber_length=0.1165987
        tendon_slack_length=0.09928656 pennation_angle_at_optimal=0.2155251 ignore_tendon_compliance=true
      PathPoint P1: pelvis (-0.06060015 0.06200015 0.0390001)
      PathPoint P2: pelvis (-0.02050005 -0.06540016 0.06560016)
      PathPoint P3: femur_r (-0.01305724 -0.04619492 0.004550249)
      PathPoint P4: femur_r (-0.02324584 -0.05183327 0.008704824)
      PathWrap: wrap_object=PS_at_brim_r method=hybrid range=(2 3)
    Millard2012EquilibriumMuscle rect_fem_r: max_isometric_force=2191.741 optimal_fiber_length=0.07504641
        tendon_slack_length=0.4453347 pennation_angle_at_optimal=0.2170149
      PathPoint recfem_r-P1: pelvis (-0.02400006 -0.0388001 0.09330023)
      PathPoint recfem_r-P2: patella_r (0.01 0.049 0.0007)
      PathPoint recfem_r-P3: patella_r (0.0121 0.0437 -0.001)
      PathPoint recfem_r-P4: patella_r (0.005 0.00247 3e-5)
      PathPoint recfem_r-P5: tibia_r (0.03178867 -0.06154911 -0.000458303)
      PathWrap: wrap_object=KnExt_at_fem_r method=hybrid
    Millard2012EquilibriumMuscle sar_r: max_isometric_force=249.4131 optimal_fiber_length=0.3981504
        tendon_slack_length=0.1225076 pennation_angle_at_optimal=0.02613542 ignore_tendon_compliance=true
      PathPoint sart_r-P1: pelvis (-0.01950005 -0.01560004 0.1056003)
      PathPoint sart_r-P2: femur_r (-0.002967554 -0.3529411 -0.04164467)
      PathPoint sart_r-P3: tibia_r (-0.02447533 -0.03910202 -0.03559161)
      PathPoint sart_r-P4: tibia_r (-0.01550429 -0.05840925 -0.02574298)
      PathPoint sart_r-P5: tibia_r (0.01326153 -0.07898413 -0.002535293)
    Millard2012EquilibriumMuscle semimem_r: max_isometric_force=2200.987 optimal_fiber_length=0.08488091
        tendon_slack_length=0.3306408 pennation_angle_at_optimal=0.2545615
      PathPoint P1: pelvis (-0.09870024 -0.1140003 0.06140015)
      PathPoint P2: tibia_r (-0.02632804 -0.03997962 -0.01911221)
      PathWrap: wrap_object=SM_at_condyles_r method=hybrid
    Millard2012EquilibriumMuscle semiten_r: max_isometric_force=591.2951 optimal_fiber_length=0.1901581
        tendon_slack_length=0.243559 pennation_angle_at_optimal=0.241295
      PathPoint P1: pelvis (-0.1038003 -0.1253003 0.05150013)
      PathPoint P2: tibia_r (-0.03042352 -0.04953573 -0.02233008)
      PathPoint P3: tibia_r (0.001852714 -0.07537621 -0.01140882)
      PathWrap: wrap_object=ST_at_condyles_r method=hybrid
    Millard2012EquilibriumMuscle soleus_r: max_isometric_force=6194.843 optimal_fiber_length=0.0428926
        tendon_slack_length=0.2742689 pennation_angle_at_optimal=0.3814289
      PathPoint P1: tibia_r (-0.007410857 -0.08932032 0.009556105)
      PathPoint P2: calcn_r (0.00426728 0.03006493 -0.005140133)
    Millard2012EquilibriumMuscle tfl_r: max_isometric_force=411.2066 optimal_fiber_length=0.09405434
        tendon_slack_length=0.4450226 pennation_angle_at_optimal=0.05235988
      PathPoint P1: pelvis (-0.03110008 0.02140005 0.1241003)
      PathPoint P2: femur_r (0.02908203 -0.09842387 0.05905432)
      PathPoint P3: femur_r (0.01058428 -0.4006198 0.03204958)
      PathPoint P4: tibia_r (0.01053122 -0.03997962 0.0337389)
    Millard2012EquilibriumMuscle tib_ant_r: max_isometric_force=1227.452 optimal_fiber_length=0.06653205
        tendon_slack_length=0.2342367 pennation_angle_at_optimal=0.1951828
      PathPoint tibant_r-P1: tibia_r (0.01501674 -0.1279348 0.01579683)
      PathPoint tibant_r-P2: tibia_r (0.02447533 -0.1858565 0.01248144)
      PathPoint tibant_r-P3: tibia_r (0.02272013 -0.3567937 -0.01287149)
      PathPoint tibant_r-P4: calcn_r (0.1130829 0.01726309 -0.02958001)
    Millard2012EquilibriumMuscle tib_post_r: max_isometric_force=1730.154 optimal_fiber_length=0.03682826
        tendon_slack_length=0.2735615 pennation_angle_at_optimal=0.2264891
      PathPoint tibpost_r-P1: tibia_r (-0.003997962 -0.1271547 0.01004366)
      PathPoint tibpost_r-P2: tibia_r (-0.01599185 -0.3564037 -0.01706447)
      PathPoint tibpost_r-P3: calcn_r (0.04044218 0.03239254 -0.02773732)
      PathPoint tibpost_r-P4: calcn_r (0.07487137 0.0154204 -0.0272524)
    Millard2012EquilibriumMuscle vas_int_r: max_isometric_force=1697.361 optimal_fiber_length=0.1154694
        tendon_slack_length=0.2023182 pennation_angle_at_optimal=0.06309973
      PathPoint vasint_r-P1: femur_r (0.02868635 -0.1903191 0.03066472)
      PathPoint vasint_r-P2: femur_r (0.03313768 -0.2061461 0.02819176)
      PathPoint vasint_r-P3: patella_r (0.0058 0.048 -0.0006)
      PathPoint vasint_r-P4: patella_r (0.005 0.00247 -0.00039)
      PathPoint vasint_r-P5: tibia_r (0.03175942 -0.06162712 0.0004192985)
      PathWrap: wrap_object=KnExt_at_fem_r method=hybrid
    Millard2012EquilibriumMuscle vas_lat_r: max_isometric_force=5148.767 optimal_fiber_length=0.1154865
        tendon_slack_length=0.2181412 pennation_angle_at_optimal=0.2528673
      PathPoint vaslat_r-P1: femur_r (0.004748086 -0.1833948 0.03452254)
      PathPoint vaslat_r-P2: femur_r (0.02660907 -0.2562977 0.04045765)
      PathPoint vaslat_r-P3: patella_r (0.0103 0.0423 0.0141)
      PathPoint vaslat_r-P4: patella_r (0.005 0.00247 0.00733)
      PathPoint vaslat_r-P5: tibia_r (0.03173017 -0.06180264 0.004982826)
      PathWrap: wrap_object=KnExtVL_at_fem_r method=hybrid
    Millard2012EquilibriumMuscle vas_med_r: max_isometric_force=2747.823 optimal_fiber_length=0.1085718
        tendon_slack_length=0.2052994 pennation_angle_at_optimal=0.4222225
      PathPoint vasmed_r-P1: femur_r (0.01384858 -0.2076298 0.01859667)
      PathPoint vasmed_r-P2: femur_r (0.03521497 -0.2739052 0.0008902661)
      PathPoint vasmed_r-P3: patella_r (0.0063 0.0445 -0.017)
      PathPoint vasmed_r-P4: patella_r (0.005 0.00247 -0.0085)
      PathPoint vasmed_r-P5: tibia_r (0.0311061 -0.06198791 -0.006611264)
      PathWrap: wrap_object=KnExt_at_fem_r method=hybrid
    Millard2012EquilibriumMuscle add_brev_l: max_isometric_force=625.8197 optimal_fiber_length=0.1022839
        tendon_slack_length=0.03516969 pennation_angle_at_optimal=0.1147809 ignore_tendon_compliance=true
      PathPoint addbrev_l-P1: pelvis (-0.01910005 -0.09400023 -0.01540004)
      PathPoint addbrev_l-P2: femur_l (-0.001978369 -0.1167238 -0.0246307)
      PathWrap: wrap_object=AB_at_femshaft_l method=hybrid
    Millard2012EquilibriumMuscle add_long_l: max_isometric_force=916.8 optimal_fiber_length=0.1071066
        tendon_slack_length=0.1304675 pennation_angle_at_optimal=0.1377704
      PathPoint addlong_l-P1: pelvis (-0.007580019 -0.08890022 -0.01888005)
      PathPoint addlong_l-P2: femur_l (0.01113822 -0.2367811 -0.01565879)
      PathWrap: wrap_object=AL_at_femshaft_l method=hybrid
    Millard2012EquilibriumMuscle addmagDist_l: max_isometric_force=597.2951 optimal_fiber_length=0.1749768
        tendon_slack_length=0.08628438 pennation_angle_at_optimal=0.194705 ignore_tendon_compliance=true
      PathPoint P1: pelvis (-0.07404018 -0.1276703 -0.0398201)
      PathPoint P2: femur_l (0.01112833 -0.259661 -0.01909126)
      PathWrap: wrap_object=AMdist_at_femshaft_l method=hybrid
    Millard2012EquilibriumMuscle addmagIsch_l: max_isometric_force=597.2951 optimal_fiber_length=0.1542752
        tendon_slack_length=0.2136771 pennation_angle_at_optimal=0.1680443
      PathPoint P1: pelvis (-0.08962022 -0.1297603 -0.0417101)
      PathPoint P2: femur_l (0.004757978 -0.3837739 0.03237601)
      PathWrap: wrap_object=AMisch_at_condyles_l method=hybrid
    Millard2012EquilibriumMuscle addmagMid_l: max_isometric_force=597.2951 optimal_fiber_length=0.136118
        tendon_slack_length=0.04609202 pennation_angle_at_optimal=0.2073076 ignore_tendon_compliance=true
      PathPoint P1: pelvis (-0.05266013 -0.1207503 -0.02854007)
      PathPoint P2: femur_l (0.002393827 -0.1606436 -0.02890397)
      PathWrap: wrap_object=AMmid_at_femshaft_l method=hybrid
    Millard2012EquilibriumMuscle addmagProx_l: max_isometric_force=597.2951 optimal_fiber_length=0.1049365
        tendon_slack_length=0.04007075 pennation_angle_at_optimal=0.3114833 ignore_tendon_compliance=true
      PathPoint P1: pelvis (-0.03098008 -0.1075503 -0.01365003)
      PathPoint P2: femur_l (-0.01510485 -0.0780071 -0.03167369)
      PathWrap: wrap_object=AMprox_at_femshaft_l method=hybrid
    Millard2012EquilibriumMuscle bifemlh_l: max_isometric_force=1313.184 optimal_fiber_length=0.09628549
        tendon_slack_length=0.3280218 pennation_angle_at_optimal=0.1759182
      PathPoint bflh_l-P1: pelvis (-0.1040003 -0.1191003 -0.05860014)
      PathPoint bflh_l-P2: tibia_l (-0.03350487 -0.03557211 -0.03527958)
      PathPoint bflh_l-P3: tibia_l (-0.02636705 -0.04883364 -0.03389492)
    Millard2012EquilibriumMuscle bifemsh_l: max_isometric_force=557.1148 optimal_fiber_length=0.108885
        tendon_slack_length=0.1044597 pennation_angle_at_optimal=0.2642232 ignore_tendon_compliance=true
      PathPoint bfsh_l-P1: femur_l (0.004945923 -0.2088169 -0.02314692)
      PathPoint bfsh_l-P2: tibia_l (-0.02794673 -0.0320227 -0.03124261)
      PathWrap: wrap_object=BF140_at_gastroc_l method=hybrid
    Millard2012EquilibriumMuscle ext_dig_l: max_isometric_force=603.4982 optimal_fiber_length=0.06743663
        tendon_slack_length=0.3589567 pennation_angle_at_optimal=0.2182582
      PathPoint edl_l-P1: tibia_l (-0.0156018 -0.1128205 -0.01998981)
      PathPoint edl_l-P2: tibia_l (0.01599185 -0.3666424 -0.01092126)
      PathPoint edl_l-P3: calcn_l (0.08912797 0.03491411 -0.0007758692)
      PathPoint edl_l-P4: calcn_l (0.1567256 0.0053341 -0.01260787)
      PathPoint edl_l-P5: toes_l (0.0002909509 0.004558231 -0.0148385)
      PathPoint edl_l-P6: toes_l (0.04296375 -0.0003879346 -0.02424591)
    Millard2012EquilibriumMuscle ext_hal_l: max_isometric_force=285.8675 optimal_fiber_length=0.07276914
        tendon_slack_length=0.3179226 pennation_angle_at_optimal=0.1972681
      PathPoint ehl_l-P1: tibia_l (-0.01365158 -0.1511425 -0.01842963)
      PathPoint ehl_l-P2: tibia_l (0.0069233 -0.2836603 -0.01599185)
      PathPoint ehl_l-P3: tibia_l (0.01950225 -0.3601091 0.002730316)
      PathPoint ehl_l-P4: calcn_l (0.09407414 0.03772664 0.02046355)
      PathPoint ehl_l-P5: calcn_l (0.1253999 0.02996795 0.0249248)
      PathPoint ehl_l-P6: calcn_l (0.1681696 0.01348073 0.02715542)
      PathPoint ehl_l-P7: toes_l (0.02890113 0.003976329 0.02376099)
      PathPoint ehl_l-P8: toes_l (0.05460179 0.003297444 0.01803896)
    Millard2012EquilibriumMuscle flex_dig_l: max_isometric_force=423.177 optimal_fiber_length=0.04337437
        tendon_slack_length=0.368364 pennation_angle_at_optimal=0.2248391
      PathPoint fdl_l-P1: tibia_l (-0.002242759 -0.1786406 0.001755203)
      PathPoint fdl_l-P2: tibia_l (-0.01716198 -0.3554286 0.0120914)
      PathPoint fdl_l-P3: calcn_l (0.04228487 0.03054985 0.02715542)
      PathPoint fdl_l-P4: calcn_l (0.06866442 0.01706912 0.0255067)
      PathPoint fdl_l-P5: calcn_l (0.1607989 -0.007855675 -0.0112501)
      PathPoint fdl_l-P6: toes_l (-0.001842689 -0.007564724 -0.0142566)
      PathPoint fdl_l-P7: toes_l (0.02764034 -0.006885839 -0.02085148)
      PathPoint fdl_l-P8: toes_l (0.04276979 -0.005819019 -0.02347004)
    Millard2012EquilibriumMuscle flex_hal_l: max_isometric_force=907.8393 optimal_fiber_length=0.05123767
        tendon_slack_length=0.3445074 pennation_angle_at_optimal=0.2580255
      PathPoint fhl_l-P1: tibia_l (-0.03022849 -0.2109169 -0.01950225)
      PathPoint fhl_l-P2: tibia_l (-0.02359773 -0.3579639 0.007410857)
      PathPoint fhl_l-P3: calcn_l (0.03627188 0.02676749 0.02337306)
      PathPoint fhl_l-P4: calcn_l (0.100669 0.006594888 0.02482781)
      PathPoint fhl_l-P5: calcn_l (0.1673938 -0.005140133 0.0260886)
      PathPoint fhl_l-P6: toes_l (0.01503247 -0.006206953 0.02570067)
      PathPoint fhl_l-P7: toes_l (0.05450481 -0.009892332 0.01755404)
    Millard2012EquilibriumMuscle lat_gas_l: max_isometric_force=1575.059 optimal_fiber_length=0.06731494
        tendon_slack_length=0.3648665 pennation_angle_at_optimal=0.2102268
      PathPoint gaslat_l-P1: femur_l (0.001978369 -0.3768793 -0.02036731)
      PathPoint gaslat_l-P2: calcn_l (0.00426728 0.03006493 0.005140133)
      PathWrap gaslat_l_at_shank: wrap_object=GasLat_at_shank_l method=hybrid
      PathWrap gaslat_l_at_condyles: wrap_object=GasLat_at_condyles_l method=hybrid
    Millard2012EquilibriumMuscle med_gas_l: max_isometric_force=3115.515 optimal_fiber_length=0.05756382
        tendon_slack_length=0.3775797 pennation_angle_at_optimal=0.1656816
      PathPoint gasmed_l-P1: femur_l (0.005935108 -0.3808361 0.02176206)
      PathPoint gasmed_l-P2: calcn_l (0.00426728 0.03006493 0.005140133)
      PathWrap gas_med_l_at_shank: wrap_object=GasMed_at_shank_l method=hybrid
      PathWrap gas_med_l_at_condyles: wrap_object=GasMed_at_condyles_l method=hybrid
    Millard2012EquilibriumMuscle glut_max1_l: max_isometric_force=983.7836 optimal_fiber_length=0.1464935
        tendon_slack_length=0.08699922 pennation_angle_at_optimal=0.3540118 ignore_tendon_compliance=true
      PathPoint glmax1_l-P1: pelvis (-0.1231003 0.03450009 -0.05630014)
      PathPoint glmax1_l-P2: pelvis (-0.1257003 -0.02420006 -0.07790019)
      PathPoint glmax1_l-P3: femur_l (-0.0439198 -0.03224742 -0.02987337)
      PathPoint glmax1_l-P4: femur_l (-0.02740041 -0.05598785 -0.04649168)
      PathWrap: wrap_object=Gmax1_at_pelvis_l method=hybrid
    Millard2012EquilibriumMuscle glut_max2_l: max_isometric_force=1406.046 optimal_fiber_length=0.1562596
        tendon_slack_length=0.108486 pennation_angle_at_optimal=0.3673821 ignore_tendon_compliance=true
      PathPoint glmax2_l-P1: pelvis (-0.1317003 0.008700021 -0.04620011)
      PathPoint glmax2_l-P2: pelvis (-0.1344003 -0.06090015 -0.0813002)
      PathPoint glmax2_l-P3: femur_l (-0.04451331 -0.05776838 -0.02492745)
      PathPoint glmax2_l-P4: femur_l (-0.01543128 -0.1005012 -0.04144683)
      PathWrap: wrap_object=Gmax2_at_pelvis_l method=hybrid
    Millard2012EquilibriumMuscle glut_max3_l: max_isometric_force=947.7541 optimal_fiber_length=0.166002
        tendon_slack_length=0.1023845 pennation_angle_at_optimal=0.3824161 ignore_tendon_compliance=true
      PathPoint glmax3_l-P1: pelvis (-0.1300003 -0.05250013 -0.009000022)
      PathPoint glmax3_l-P2: pelvis (-0.1273003 -0.1263003 -0.04350011)
      PathPoint glmax3_l-P3: femur_l (-0.02779609 -0.1112833 -0.009298335)
      PathPoint glmax3_l-P4: femur_l (-0.005935108 -0.1403653 -0.04065549)
      PathWrap: wrap_object=Gmax3_at_pelvis_l method=hybrid
    Millard2012EquilibriumMuscle glut_med1_l: max_isometric_force=1093.467 optimal_fiber_length=0.07284137
        tendon_slack_length=0.05569554 pennation_angle_at_optimal=0.3165559 ignore_tendon_compliance=true
      PathPoint glmed1_l-P1: pelvis (-0.04450011 0.02450006 -0.1172003)
      PathPoint glmed1_l-P2: femur_l (-0.02156422 -0.01157346 -0.05489974)
    Millard2012EquilibriumMuscle glut_med2_l: max_isometric_force=765.0917 optimal_fiber_length=0.07282374
        tendon_slack_length=0.06509127 pennation_angle_at_optimal=0.3165559 ignore_tendon_compliance=true
      PathPoint glmed2_l-P1: pelvis (-0.08500021 0.03160008 -0.06750017)
      PathPoint glmed2_l-P2: femur_l (-0.02552096 -0.005737271 -0.05213003)
    Millard2012EquilibriumMuscle glut_med3_l: max_isometric_force=871.1993 optimal_fiber_length=0.07278115
        tendon_slack_length=0.04509724 pennation_angle_at_optimal=0.3165559 ignore_tendon_compliance=true
      PathPoint glmed3_l-P1: pelvis (-0.1152003 -0.007300018 -0.05260013)
      PathPoint glmed3_l-P2: femur_l (-0.0305658 -0.004649168 -0.05123976)
    Millard2012EquilibriumMuscle glut_min1_l: max_isometric_force=374.0459 optimal_fiber_length=0.06772118
        tendon_slack_length=0.01607161 pennation_angle_at_optimal=0.1745329 ignore_tendon_compliance=true
      PathPoint glmin1_l-P1: pelvis (-0.04640011 -0.01490004 -0.1042003)
      PathPoint glmin1_l-P2: femur_l (-0.007122129 -0.01028752 -0.05539434)
    Millard2012EquilibriumMuscle glut_min2_l: max_isometric_force=394.8197 optimal_fiber_length=0.05575174
        tendon_slack_length=0.02598335 pennation_angle_at_optimal=0 ignore_tendon_compliance=true
      PathPoint glmin2_l-P1: pelvis (-0.06160015 -0.01420004 -0.09710024)
      PathPoint glmin2_l-P2: femur_l (-0.009496172 -0.01028752 -0.05539434)
    Millard2012EquilibriumMuscle glut_min3_l: max_isometric_force=446.7738 optimal_fiber_length=0.03782649
        tendon_slack_length=0.05064021 pennation_angle_at_optimal=0.01745329
      PathPoint glmin3_l-P1: pelvis (-0.07890019 -0.01550004 -0.0798002)
      PathPoint glmin3_l-P2: femur_l (-0.01335399 -0.008210232 -0.05440515)
    Millard2012EquilibriumMuscle grac_l: max_isometric_force=281.3115 optimal_fiber_length=0.2244925
        tendon_slack_length=0.1695163 pennation_angle_at_optimal=0.1720016 ignore_tendon_compliance=true
      PathPoint P1: pelvis (-0.04736012 -0.1293203 -0.02456006)
      PathPoint P2: tibia_l (-0.01796158 -0.04636661 0.02887309)
      PathPoint P3: tibia_l (0.001735701 -0.06788735 0.01533852)
      PathWrap: wrap_object=GR_at_condyles_l method=hybrid
    Millard2012EquilibriumMuscle iliacus_l: max_isometric_force=1021.141 optimal_fiber_length=0.1062724
        tendon_slack_length=0.09582534 pennation_angle_at_optimal=0.279914 ignore_tendon_compliance=true
      PathPoint P1: pelvis (-0.06050015 0.03090008 -0.08430021)
      PathPoint P2: pelvis (-0.01350003 -0.05570014 -0.07560019)
      PathPoint P3: femur_l (-0.002275125 -0.05588893 -0.01374967)
      PathPoint P4: femur_l (-0.01206805 -0.06301106 -0.01938802)
      PathWrap: wrap_object=IL_at_brim_l method=hybrid range=(2 3)
    Millard2012EquilibriumMuscle per_brev_l: max_isometric_force=521.2016 optimal_fiber_length=0.04422138
        tendon_slack_length=0.1436976 pennation_angle_at_optimal=0.2052361
      PathPoint perbrev_l-P1: tibia_l (-0.02369524 -0.2468985 -0.02447533)
      PathPoint perbrev_l-P2: tibia_l (-0.03305632 -0.3796114 -0.02428031)
      PathPoint perbrev_l-P3: tibia_l (-0.02779071 -0.3904351 -0.02486537)
      PathPoint perbrev_l-P4: calcn_l (0.0456793 0.02618558 -0.02259719)
      PathPoint perbrev_l-P5: calcn_l (0.06565793 0.02123942 -0.03326539)
    Millard2012EquilibriumMuscle per_long_l: max_isometric_force=1115.371 optimal_fiber_length=0.04945329
        tendon_slack_length=0.3234135 pennation_angle_at_optimal=0.2479525
      PathPoint perlong_l-P1: tibia_l (-0.01950225 -0.133883 -0.02749818)
      PathPoint perlong_l-P2: tibia_l (-0.03091107 -0.380294 -0.02311017)
      PathPoint perlong_l-P3: tibia_l (-0.02652307 -0.3914102 -0.02340271)
      PathPoint perlong_l-P4: calcn_l (0.04247884 0.02230624 -0.02143339)
      PathPoint perlong_l-P5: calcn_l (0.06604586 0.01028027 -0.02754336)
      PathPoint perlong_l-P6: calcn_l (0.08263007 0.006691872 -0.01144407)
      PathPoint perlong_l-P7: calcn_l (0.1166713 0.00824361 0.01784499)
    Millard2012EquilibriumMuscle peri_l: max_isometric_force=1029.787 optimal_fiber_length=0.02594384
        tendon_slack_length=0.114658 pennation_angle_at_optimal=0.1745329
      PathPoint piri_l-P1: pelvis (-0.1018103 -0.006530016 -0.01351003)
      PathPoint piri_l-P2: pelvis (-0.1020203 -0.03066008 -0.06092015)
      PathPoint piri_l-P3: femur_l (-0.01463993 -0.003561065 -0.04322737)
    Millard2012EquilibriumMuscle psoas_l: max_isometric_force=1426.79 optimal_fiber_length=0.1165987
        tendon_slack_length=0.09928656 pennation_angle_at_optimal=0.2155251 ignore_tendon_compliance=true
      PathPoint P1: pelvis (-0.06060015 0.06200015 -0.0390001)
      PathPoint P2: pelvis (-0.02050005 -0.06540016 -0.06560016)
      PathPoint P3: femur_l (-0.01305724 -0.04619492 -0.004550249)
      PathPoint P4: femur_l (-0.02324584 -0.05183327 -0.008704824)
      PathWrap: wrap_object=PS_at_brim_l method=hybrid range=(2 3)
    Millard2012EquilibriumMuscle rect_fem_l: max_isometric_force=2191.741 optimal_fiber_length=0.07504641
        tendon_slack_length=0.4453347 pennation_angle_at_optimal=0.2170149
      PathPoint recfem_l-P1: pelvis (-0.02400006 -0.0388001 -0.09330023)
      PathPoint recfem_l-P2: patella_l (0.01 0.049 -0.0007)
      PathPoint recfem_l-P3: patella_l (0.0121 0.0437 0.001)
      PathPoint recfem_l-P4: patella_l (0.005 0.00247 -3e-5)
      PathPoint recfem_l-P5: tibia_l (0.03178867 -0.06154911 0.000458303)
      PathWrap: wrap_object=KnExt_at_fem_l method=hybrid
    Millard2012EquilibriumMuscle sar_l: max_isometric_force=249.4131 optimal_fiber_length=0.3981504
        tendon_slack_length=0.1225076 pennation_angle_at_optimal=0.02613542 ignore_tendon_compliance=true
      PathPoint sart_l-P1: pelvis (-0.01950005 -0.01560004 -0.1056003)
      PathPoint sart_l-P2: femur_l (-0.002967554 -0.3529411 0.04164467)
      PathPoint sart_l-P3: tibia_l (-0.02447533 -0.03910202 0.03559161)
      PathPoint sart_l-P4: tibia_l (-0.01550429 -0.05840925 0.02574298)
      PathPoint sart_l-P5: tibia_l (0.01326153 -0.07898413 0.002535293)
    Millard2012EquilibriumMuscle semimem_l: max_isometric_force=2200.987 optimal_fiber_length=0.08488091
        tendon_slack_length=0.3306408 pennation_angle_at_optimal=0.2545615
      PathPoint P1: pelvis (-0.09870024 -0.1140003 -0.06140015)
      PathPoint P2: tibia_l (-0.02632804 -0.03997962 0.01911221)
      PathWrap: wrap_object=SM_at_condyles_l method=hybrid
    Millard2012EquilibriumMuscle semiten_l: max_isometric_force=591.2951 optimal_fiber_length=0.1901581
        tendon_slack_length=0.243559 pennation_angle_at_optimal=0.241295
      PathPoint P1: pelvis (-0.1038003 -0.1253003 -0.05150013)
      PathPoint P2: tibia_l (-0.03042352 -0.04953573 0.02233008)
      PathPoint P3: tibia_l (0.001852714 -0.07537621 0.01140882)
      PathWrap: wrap_object=ST_at_condyles_l method=hybrid
    Millard2012EquilibriumMuscle soleus_l: max_isometric_force=6194.843 optimal_fiber_length=0.0428926
        tendon_slack_length=0.2742689 pennation_angle_at_optimal=0.3814289
      PathPoint P1: tibia_l (-0.007410857 -0.08932032 -0.009556105)
      PathPoint P2: calcn_l (0.00426728 0.03006493 0.005140133)
    Millard2012EquilibriumMuscle tfl_l: max_isometric_force=411.2066 optimal_fiber_length=0.09405434
        tendon_slack_length=0.4450226 pennation_angle_at_optimal=0.05235988
      PathPoint P1: pelvis (-0.03110008 0.02140005 -0.1241003)
      PathPoint P2: femur_l (0.02908203 -0.09842387 -0.05905432)
      PathPoint P3: femur_l (0.01058428 -0.4006198 -0.03204958)
      PathPoint P4: tibia_l (0.01053122 -0.03997962 -0.0337389)
    Millard2012EquilibriumMuscle tib_ant_l: max_isometric_force=1227.452 optimal_fiber_length=0.06653205
        tendon_slack_length=0.2342367 pennation_angle_at_optimal=0.1951828
      PathPoint tibant_l-P1: tibia_l (0.01501674 -0.1279348 -0.01579683)
      PathPoint tibant_l-P2: tibia_l (0.02447533 -0.1858565 -0.01248144)
      PathPoint tibant_l-P3: tibia_l (0.02272013 -0.3567937 0.01287149)
      PathPoint tibant_l-P4: calcn_l (0.1130829 0.01726309 0.02958001)
    Millard2012EquilibriumMuscle tib_post_l: max_isometric_force=1730.154 optimal_fiber_length=0.03682826
        tendon_slack_length=0.2735615 pennation_angle_at_optimal=0.2264891
      PathPoint tibpost_l-P1: tibia_l (-0.003997962 -0.1271547 -0.01004366)
      PathPoint tibpost_l-P2: tibia_l (-0.01599185 -0.3564037 0.01706447)
      PathPoint tibpost_l-P3: calcn_l (0.04044218 0.03239254 0.02773732)
      PathPoint tibpost_l-P4: calcn_l (0.07487137 0.0154204 0.0272524)
    Millard2012EquilibriumMuscle vas_int_l: max_isometric_force=1697.361 optimal_fiber_length=0.1154694
        tendon_slack_length=0.2023182 pennation_angle_at_optimal=0.06309973
      PathPoint vasint_l-P1: femur_l (0.02868635 -0.1903191 -0.03066472)
      PathPoint vasint_l-P2: femur_l (0.03313768 -0.2061461 -0.02819176)
      PathPoint vasint_l-P3: patella_l (0.0058 0.048 0.0006)
      PathPoint vasint_l-P4: patella_l (0.005 0.00247 0.00039)
      PathPoint vasint_l-P5: tibia_l (0.03175942 -0.06162712 -0.0004192985)
      PathWrap: wrap_object=KnExt_at_fem_l method=hybrid
    Millard2012EquilibriumMuscle vas_lat_l: max_isometric_force=5148.767 optimal_fiber_length=0.1154865
        tendon_slack_length=0.2181412 pennation_angle_at_optimal=0.2528673
      PathPoint vaslat_l-P1: femur_l (0.004748086 -0.1833948 -0.03452254)
      PathPoint vaslat_l-P2: femur_l (0.02660907 -0.2562977 -0.04045765)
      PathPoint vaslat_l-P3: patella_l (0.0103 0.0423 -0.0141)
      PathPoint vaslat_l-P4: patella_l (0.005 0.00247 -0.00733)
      PathPoint vaslat_l-P5: tibia_l (0.03173017 -0.06180264 -0.004982826)
      PathWrap: wrap_object=KnExtVL_at_fem_l method=hybrid
    Millard2012EquilibriumMuscle vas_med_l: max_isometric_force=2747.823 optimal_fiber_length=0.1085718
        tendon_slack_length=0.2052994 pennation_angle_at_optimal=0.4222225
      PathPoint vasmed_l-P1: femur_l (0.01384858 -0.2076298 -0.01859667)
      PathPoint vasmed_l-P2: femur_l (0.03521497 -0.2739052 -0.0008902661)
      PathPoint vasmed_l-P3: patella_l (0.0063 0.0445 0.017)
      PathPoint vasmed_l-P4: patella_l (0.005 0.00247 0.0085)
      PathPoint vasmed_l-P5: tibia_l (0.0311061 -0.06198791 0.006611264)
      PathWrap: wrap_object=KnExt_at_fem_l method=hybrid
    ObjectGroup right_leg: members=(addbrev_r addlong_r addmagDist_r addmagIsch_r addmagMid_r addmagProx_r edl_r ehl_r fdl_r fhl_r gasmed_r glmax1_r glmax2_r glmax3_r glmed1_r glmed2_r glmed3_r glmin1_r glmin2_r glmin3_r grac_r iliacus_r perbrev_r perlong_r piri_r psoas_r recfem_r sart_r semimem_r semiten_r soleus_r tfl_r tibant_r tibpost_r vasint_r vasmed_r)
    ObjectGroup left_leg: members=(addbrev_l addlong_l addmagDist_l addmagIsch_l addmagMid_l addmagProx_l edl_l ehl_l fdl_l fhl_l gasmed_l glmax1_l glmax2_l glmax3_l glmed1_l glmed2_l glmed3_l glmin1_l glmin2_l glmin3_l grac_l iliacus_l perbrev_l perlong_l piri_l psoas_l recfem_l sart_l semimem_l semiten_l soleus_l tfl_l tibant_l tibpost_l vasint_l vasmed_l)
    ObjectGroup hip_add_r: members=(addbrev_r addlong_r addmagDist_r addmagIsch_r addmagMid_r addmagProx_r grac_r semimem_r semiten_r)
    ObjectGroup hip_abd_r: members=(glmax1_r glmed1_r glmed2_r glmed3_r glmin1_r glmin2_r glmin3_r piri_r sart_r tfl_r)
    ObjectGroup hip_flex_r: members=(addbrev_r addlong_r glmin1_r grac_r iliacus_r psoas_r recfem_r sart_r tfl_r)
    ObjectGroup hip_ext_r: members=(addlong_r addmagDist_r addmagIsch_r addmagMid_r addmagProx_r glmax1_r glmax2_r glmax3_r glmed1_r glmed2_r glmed3_r glmin3_r semimem_r semiten_r)
    ObjectGroup hip_inrot_r: members=(glmed1_r glmed2_r glmed3_r glmin1_r iliacus_r psoas_r tfl_r)
    ObjectGroup hip_exrot_r: members=(glmin3_r piri_r)
    ObjectGroup knee_flex_r: members=(gasmed_r grac_r sart_r semimem_r semiten_r)
    ObjectGroup knee_ext_r: members=(recfem_r vasint_r vasmed_r)
    ObjectGroup ankle_df_r: members=(edl_r ehl_r tibant_r)
    ObjectGroup ankle_pf_r: members=(fdl_r fhl_r gasmed_r perbrev_r perlong_r soleus_r tibpost_r)
    ObjectGroup everter_r: members=(edl_r perbrev_r perlong_r)
    ObjectGroup inverter_r: members=(ehl_r fdl_r fhl_r tibant_r tibpost_r)
    ObjectGroup hip_add_l: members=(addbrev_l addlong_l addmagDist_l addmagIsch_l addmagMid_l addmagProx_l grac_l semimem_l semiten_l)
    ObjectGroup hip_abd_l: members=(glmax1_l glmed1_l glmed2_l glmed3_l glmin1_l glmin2_l glmin3_l sart_l tfl_l)
    ObjectGroup hip_flex_l: members=(addbrev_l addlong_l glmin1_l grac_l iliacus_l psoas_l recfem_l sart_l tfl_l)
    ObjectGroup hip_ext_l: members=(addlong_l addmagDist_l addmagIsch_l addmagMid_l addmagProx_l glmax1_l glmax2_l glmax3_l glmed1_l glmed2_l glmed3_l glmin3_l semimem_l semiten_l)
    ObjectGroup hip_exrot_l: members=glmin3_l
    ObjectGroup hip_inrot_l: members=(glmed1_l glmed2_l glmed3_l glmin1_l iliacus_l psoas_l tfl_l)
    ObjectGroup knee_flex_l: members=(gasmed_l grac_l sart_l semimem_l semiten_l)
    ObjectGroup knee_ext_l: members=(recfem_l vasint_l vasmed_l)
    ObjectGroup ankle_df_l: members=(edl_l ehl_l tibant_l)
    ObjectGroup ankle_pf_l: members=(fdl_l fhl_l gasmed_l perbrev_l perlong_l soleus_l tibpost_l)
    ObjectGroup everter_l: members=(edl_l perbrev_l perlong_l)
    ObjectGroup inverter_l: members=(ehl_l fdl_l fhl_l tibant_l tibpost_l)
