# OpenSim document version 40500
MarkerSet:
  Marker US1: tibia_r (-0.178961 -0.329606 -0.054652)
  Marker US2: tibia_r (-0.105819 -0.334573 -0.0207735)
  Marker US3: tibia_r (-0.111712 -0.204047 -0.0519084)
  Marker rKnee: femur_r (-0.0011639 -0.421392 0.0496568)
  Marker rShank1: tibia_r (0.0024143 -0.144189 0.0757919)
  Marker rShank2: tibia_r (-0.0404993 -0.180902 0.0721318)
  Marker rShank3: tibia_r (0.00216019 -0.21761 0.0708774)
  Marker rAnkle: tibia_r (-0.014618 -0.3942 0.0382908)
  Marker rCalc: calcn_r (-0.0155176 0.0170541 -8.42392e-5)
  Marker rMTP: toes_r (-0.0431602 0.0118011 0.0596657)
  Marker rPedalAnt: toes_r (0.00890049 -0.0392889 0.0509014)
  Marker lASIS: pelvis (-0.0103376 0.0244785 -0.156177)
  Marker lPelvis1: pelvis (-0.169672 0.0129349 -0.0468777)
  Marker lPelvis2: pelvis (-0.173276 0.0373127 -0.0281665)
  Marker rPelvis3: pelvis (-0.185177 0.00647756 0.0279881)
  Marker rPelvis4: pelvis (-0.166231 0.0124476 0.0434152)
  Marker rASIS: pelvis (-0.0131242 0.0219815 0.16015)
  Marker rGTroch: femur_r (0.0119938 -0.0696395 0.103217)
  Marker rThigh1: femur_r (-0.0324023 -0.214771 0.092975)
  Marker rThigh2: femur_r (-0.0137467 -0.298558 0.0821982)
  Marker rThigh3: femur_r (0.018357 -0.266043 0.0920765)
  Marker lGTroch: femur_l (0.014615 -0.0594683 -0.102025)
  Marker lKnee: femur_l (-0.00242493 -0.421099 -0.0541226)
  Marker lAnkle: tibia_l (-0.0212949 -0.392626 -0.0325338)
  Marker lCalc: calcn_l (-0.0100679 0.0162999 -0.000478927)
  Marker lMTP: toes_l (-0.0436574 0.00765943 -0.0541002)
  Marker lPedalAnt: toes_l (0.0189826 -0.0356474 -0.044334)
  Marker rHJC: pelvis (-0.0578242 -0.0787344 0.0855814)
  Marker lHJC: pelvis (-0.0563302 -0.0773957 -0.0840067)
  Marker rPedalCOP: calcn_r (0.169559 -0.038375 -0.00578795)
  Marker lPedalCOP: calcn_l (0.182024 -0.0334513 0.0120842)
  Marker rKneeAdj: femur_r (-0.00292341 -0.420393 0.0498716)
  Marker lKneeAdj: femur_l (-0.00274276 -0.420898 -0.0541512)
  Marker rSandSurf: toes_r (-0.0194356 -0.00627084 -0.0068135)
  Marker lSandSurf: toes_l (-0.00753218 -0.00147094 0.0120783)
